// SBML level 3 version 2
// Created with https://github.com/matthiaskoenig/sbmlutils.

model losartan_intestine(PODOSE_los, Ka_dis_los, Mr_los, Vext, Vgu, Vlumen, Vfeces, Vstomach, los_lumen, los_ext, los_feces, e3174_lumen, e3174_feces, l158_lumen, l158_feces)
  // Model for losartan absorption in the small intestine
  // Model for losartan absorption
  // absorption losartan (los), ~60% fraction absorbed (bioavailability ~33%, due to liver metabolism)
  // enterohepatic circulation of los, e3174 and l158
  // ABCB1 (P-glycoprotein) influences pharmacokinetics, possible role in intestinal uptake
  // Terms of use
  // The content of this model has been carefully created in a manual research effort. This file has been created by Matthias König using sbmlutils. For questions contact koenigmx@hu-berlin.de. Copyright © 2025 Matthias König.
  // This work is licensed under a Creative Commons Attribution 4.0 International License.
  // Redistribution and use of any part of this model, with or without modification, are permitted provided that the following conditions are met:
  // Redistributions of this SBML file must retain the above copyright notice, this list of conditions and the following disclaimer.
  // Redistributions in a different form must reproduce the above copyright notice, this list of conditions and the following disclaimer in the documentation and/or other materials provided with the distribution.
  // This model is distributed in the hope that it will be useful, but WITHOUT ANY WARRANTY; without even the implied warranty of MERCHANTABILITY or FITNESS FOR A PARTICULAR PURPOSE.
  // model units - substance: mmole, time: min, volume: litre, area: m2, length: metre, extent: mmole

  // Compartments:
  compartment Vext = 1 litre; Vext is "plasma";  // SBO:0000290 ncit:C13356 BTO:0000131
  compartment Vgu = 1.2825 litre; Vgu is "intestine";  // SBO:0000290 FMA:45615 BTO:0000545 ncit:C12736
  compartment Vlumen = 1.15425 litre; Vlumen is "intestinal lumen (inner part of intestine)";  // SBO:0000290 FMA:14586 UBERON:0018543
  compartment Vfeces = 1 litre;  // SBO:0000290 FMA:64183 ncit:C13234 BTO:0000440
  compartment Ventero = 1 litre; Ventero is "intestinal lining (enterocytes)";  // SBO:0000290
  compartment Vapical = NaN; Vapical has m2; Vapical is "apical membrane (intestinal membrane enterocytes)";  // 2-D; SBO:0000290 FMA:84666 GO:0016324
  compartment Vbaso = NaN; Vbaso has m2; Vbaso is "basolateral membrane (intestinal membrane enterocytes)";  // 2-D; SBO:0000290 FMA:84669 GO:0016323
  compartment Vstomach = 1 litre;  // SBO:0000290 FMA:7148 ncit:C12391 UBERON:0000945

  // Species:
  substanceOnly species $los_stomach in Vstomach = 0; los_stomach is "losartan (stomach)";  // SBO:0000247 pubchem.compound:11751549 CHEBI:6541 snomed:108582002
  species los_lumen in Vlumen = 0; los_lumen is "losartan (lumen)";  // SBO:0000247 pubchem.compound:11751549 CHEBI:6541 snomed:108582002
  species los in Ventero = 0; los is "losartan (enterocytes)";  // SBO:0000247 pubchem.compound:11751549 CHEBI:6541 snomed:108582002
  species los_ext in Vext = 0; los_ext is "losartan (plasma)";  // SBO:0000247 pubchem.compound:11751549 CHEBI:6541 snomed:108582002
  substanceOnly species los_feces in Vfeces = 0; los_feces is "losartan (feces)";  // SBO:0000247 pubchem.compound:11751549 CHEBI:6541 snomed:108582002
  species e3174_lumen in Vlumen = 0; e3174_lumen is "E3174 (lumen)";  // SBO:0000247 pubchem.compound:108185 CHEBI:74125
  substanceOnly species e3174_feces in Vfeces = 0; e3174_feces is "E3174 (feces)";  // SBO:0000247 pubchem.compound:108185 CHEBI:74125
  species l158_lumen in Vlumen = 0; l158_lumen is "L158 (lumen)";  // SBO:0000247
  substanceOnly species l158_feces in Vfeces = 0; l158_feces is "L158 (feces)";  // SBO:0000247

  // Parameters:
  // Fraction absorbed, i.e., only a fraction of the losartan in the intestinal lumen is absorbed. This parameter determines how much of the losartan is excreted.
  // F_los_abs of dose is absorbed. (1-F_los_abs) is excreted in feces.
  F_los_abs = 0.6 dimensionless; F_los_abs is "fraction absorbed losartan";  // SBO:0000002
  LOSABS_k = 0.01 per_min; LOSABS_k is "rate of losartan absorption";  // SBO:0000009
  METEXC_k = 0.01 per_min; METEXC_k is "rate of metabolite feces excretion";  // SBO:0000009
  PODOSE_los = 0 mg; PODOSE_los is "oral dose losartan [mg]";  // SBO:0000002
  Ka_dis_los = 2 per_hr; Ka_dis_los is "Ka_dis [1/hr] dissolution losartan";  // SBO:0000002
  Mr_los = 422.911 g_per_mole; Mr_los is "Molecular weight losartan [g/mole]";  // SBO:0000647
  // parameter controls activity (1.0 reference activity, < 1.0 reduced activity, > 1.0 increased activity)
  f_OATP2B1 = 1 dimensionless; f_OATP2B1 is "parameter for OATP2B1 activity";  // SBO:0000002
  // parameter controls activity (1.0 reference activity, < 1.0 reduced activity, > 1.0 increased activity)
  f_abcb1 = 1 dimensionless; f_abcb1 is "parameter for P-glycoprotein activity";  // SBO:0000002
  LOSEFL_Vmax = 1 mmole_per_min_l; LOSEFL_Vmax is "Vmax for losartan efflux (PG)";  // SBO:0000186
  LOSEFL_Km_los = 0.01 mM; LOSEFL_Km_los is "Km for losartan efflux (PG)";  // SBO:0000027
  LOSEX_Vmax = 1 mmole_per_min_l; LOSEX_Vmax is "Vmax for losartan export in plasma";  // SBO:0000186
  LOSEX_Km_los = 0.01 mM; LOSEX_Km_los is "Km for losartan export in plasma";  // SBO:0000027
  absorption has mmole_per_min; absorption is "absorption losartan";

  // Assignment rules:
  absorption := LOSABS_k*Vgu*los_lumen;

  // Rate rules:
  PODOSE_los' = -dissolution_los*Mr_los;

  // Reactions:
  // Import via OATP2B1 is irreversible at apical membrane of enterocytes.
  LOSABS: los_lumen => los; f_OATP2B1*F_los_abs*absorption; LOSABS is "absorption losartan";  // SBO:0000655
  // Efflux is catalyzed by P-glycoprotein.
  LOSEFL: los => los_lumen; f_abcb1*LOSEFL_Vmax*Vgu*los/(los + LOSEFL_Km_los); LOSEFL is "efflux losartan (PG)";  // SBO:0000655
  LOSEX: los => los_ext; LOSEX_Vmax*Vgu*los/(los + LOSEX_Km_los); LOSEX is "losartan export plasma";  // SBO:0000655
  LOSEXC: los_lumen => los_feces; (1 - F_los_abs)*absorption; LOSEXC is "excretion losartan (feces)";  // SBO:0000655
  E3174EXC: e3174_lumen => e3174_feces; METEXC_k*Vgu*e3174_lumen; E3174EXC is "excretion e3174 (feces)";  // SBO:0000655
  L158EXC: l158_lumen => l158_feces; METEXC_k*Vgu*l158_lumen; L158EXC is "excretion l158 (feces)";  // SBO:0000655
  // Swallowing, dissolution of tablet, and transport into intestine. Overall process describing the rates of this processes.
  dissolution_los: $los_stomach => los_lumen; Ka_dis_los/(60 min_per_hr)*PODOSE_los/Mr_los; dissolution_los is "dissolution losartan";

  // Unit definitions:
  unit g_per_mole = gram / mole; g_per_mole is "g/mole";
  unit l_per_min = litre / (60 second); l_per_min is "l/min";
  unit m2 = metre^2; m2 is "meter^2";
  unit mM = 1e-3 mole / litre; mM is "mmole/liter";
  unit mg = 1e-3 gram;
  unit mg_per_min = 1e-3 gram / (60 second); mg_per_min is "mg/min";
  unit mg_per_s_l = 1e-3 gram / (second * litre); mg_per_s_l is "mg/s/l";
  unit min = 60 second;
  unit min_per_hr = 60 second / (3600 second); min_per_hr is "min/hour";
  unit mmole = 1e-3 mole;
  unit mmole_per_min = 1e-3 mole / (60 second); mmole_per_min is "mmole/min";
  unit mmole_per_min_l = 1e-3 mole / (60 second * litre); mmole_per_min_l is "mmole/min/l";
  unit per_hr = 1 / (3600 second); per_hr is "1/hr";
  unit per_min = 1 / (60 second); per_min is "1/min";
  unit per_mmole = 1 / (1e-3 mole); per_mmole is "1/mmole";
end
