// SBML level 3 version 2
// Created with https://github.com/matthiaskoenig/sbmlutils.

model losartan_liver(Vext, Vli, Vbi, Vlumen, los_ext, los_lumen, e3174_ext, e3174_lumen, l158_ext, l158_lumen)
  // Model for hepatic losartan metabolism.
  // Model for losartan metabolism.
  // metabolism of losartan -> exp3174 (liver CYP2C9)
  // The content of this model has been carefully created in a manual research effort.
  // Terms of use
  // Copyright © 2026 Matthias König.
  // This work is licensed under a Creative Commons Attribution 4.0 International License.
  // Redistribution and use of any part of this model, with or without modification, are permitted provided that the following conditions are met:
  // Redistributions of this SBML file must retain the above copyright notice, this list of conditions and the following disclaimer.
  // Redistributions in a different form must reproduce the above copyright notice, this list of conditions and the following disclaimer in the documentation and/or other materials provided with the distribution.
  // This model is distributed in the hope that it will be useful, but WITHOUT ANY WARRANTY; without even the implied warranty of MERCHANTABILITY or FITNESS FOR A PARTICULAR PURPOSE.
  // occursIn FMA:7197 BTO:0000759 ncit:C12392
  // hasProperty ncit:C79371 ncit:C79372 mamo:MAMO_0000046 ncit:C66869 ncit:C29165 ncit:C66930
  // hasTaxon taxonomy:9606 snomedct:337915000
  // isDescribedBy doi:10.3390/pharmaceutics18020262 doi:10.36903/physiome.31359823 doi:10.5281/zenodo.14761114
  // model units - substance: mmole, time: min, volume: litre, area: m2, length: metre, extent: mmole

  // Compartments:
  compartment Vext = 1.5 litre; Vext is "plasma";  // SBO:0000290 ncit:C13356 BTO:0000131
  compartment Vli = 1.5 litre; Vli is "liver";  // SBO:0000290 FMA:7197 BTO:0000759 ncit:C12392
  compartment Vmem = NaN; Vmem has m2; Vmem is "plasma membrane";  // 2-D; SBO:0000290 ncit:C13735 FMA:63841 GO:0005886
  compartment Vapical = NaN; Vapical has m2; Vapical is "apical membrane";  // 2-D; SBO:0000290 FMA:84666 GO:0016324
  compartment Vbi = 1 litre; Vbi is "bile";  // SBO:0000290 FMA:62971 ncit:C13192
  compartment Vlumen = 1.15425 litre; Vlumen is "intestinal lumen (inner part of intestine)";  // SBO:0000290 FMA:14586 UBERON:0018543

  // Species:
  species los_ext in Vext = 0; los_ext is "losartan (plasma)";  // SBO:0000247 pubchem.compound:11751549 CHEBI:6541 snomedct:108582002
  species los in Vli = 0; los is "losartan (liver)";  // SBO:0000247 pubchem.compound:11751549 CHEBI:6541 snomedct:108582002
  // Bile losartan amount.
  substanceOnly species los_bi in Vbi = 0; los_bi is "losartan (bile)";  // SBO:0000247 pubchem.compound:11751549 CHEBI:6541 snomedct:108582002
  species los_lumen in Vlumen = 0; los_lumen is "losartan (lumen)";  // SBO:0000247 pubchem.compound:11751549 CHEBI:6541 snomedct:108582002
  species e3174_ext in Vext = 0; e3174_ext is "E3174 (plasma)";  // SBO:0000247 pubchem.compound:108185 CHEBI:74125
  species e3174 in Vli = 0; e3174 is "E3174 (liver)";  // SBO:0000247 pubchem.compound:108185 CHEBI:74125
  // Bile E3174 amount.
  substanceOnly species e3174_bi in Vbi = 0; e3174_bi is "E3174 (bile)";  // SBO:0000247 pubchem.compound:108185 CHEBI:74125
  species e3174_lumen in Vlumen = 0; e3174_lumen is "E3174 (lumen)";  // SBO:0000247 pubchem.compound:108185 CHEBI:74125
  species l158_ext in Vext = 0; l158_ext is "L158 (plasma)";  // SBO:0000247
  species l158 in Vli = 0; l158 is "L158 (liver)";  // SBO:0000247
  // Bile L158 amount.
  substanceOnly species l158_bi in Vbi = 0; l158_bi is "L158 (bile)";  // SBO:0000247
  species l158_lumen in Vlumen = 0; l158_lumen is "L158 (lumen)";  // SBO:0000247

  // Parameters:
  // Relative activity of the enzyme: 1.0 - normal activity (wildtype); <1.0 reduced activity; >1.0 increased activity.
  f_cyp2c9 = 1 dimensionless; f_cyp2c9 is "activity of CYP2C9";  // SBO:0000186
  MBIEX_k = 0.06631502 per_min; MBIEX_k is "rate biliary export";  // SBO:0000009
  LOSIM_k = 1 per_min; LOSIM_k is "rate losartan import";  // SBO:0000153
  LOS2E3174_Vmax = 0.0007251463 mmole_per_min_l; LOS2E3174_Vmax is "Vmax losartan → E3174";  // SBO:0000186
  // FIXME: check in vitro data
  // 1.12 +- 0.13 µM [Maekawa2009]
  // 1.134 µM [Thu2017]
  // 1.05 +- 0.017 µM [Wang2014]
  LOS2E3174_Km_los = 0.0011 mM; LOS2E3174_Km_los is "Km losartan → E3174";  // SBO:0000027
  E3174L158_k = 0.001134009 per_min; E3174L158_k is "rate losartan → L158";  // SBO:0000153
  E3174EX_k = 0.01120012 per_min; E3174EX_k is "rate E3174 export";  // SBO:0000153
  L158EX_k = 1 per_min; L158EX_k is "rate L158 export";  // SBO:0000153

  // Reactions:
  // Organic Anion Transporting Polypeptide 2B1 (OATP2B1): Recent findings suggest that losartan is also a substrate for OATP2B1, a transporter that plays a crucial role in the uptake of various drugs into hepatocytes. This transporter facilitates the entry of losartan into liver cells, where it can be metabolized by cytochrome P450 enzymes. [perplexity] Assumption: fast transport.
  LOSIM: los_ext -> los; LOSIM_k*Vli*(los_ext - los); LOSIM is "losartan import (LOSIM)";  // SBO:0000655
  // Likely catalyzed CYP2C9 and CYP3A4. Currently only modified via CYP2C9 factor.
  LOS2E3174: los => e3174; f_cyp2c9*LOS2E3174_Vmax*Vli*los/(los + LOS2E3174_Km_los); LOS2E3174 is "E3174 formation (CYP2C9/3A4)";  // SBO:0000176
  // Formation of losartan glucuronides, likely via UGT enzymes. Assumption: e3174 metabolite is converted; not much information available on pathway.
  E3174L158: e3174 => l158; E3174L158_k*Vli*e3174; E3174L158 is "L158 formation (UGT)";  // SBO:0000176
  // assumption fast transport
  E3174EX: e3174 -> e3174_ext; E3174EX_k*Vli*(e3174 - e3174_ext); E3174EX is "E3174 export (E3174EX)";  // SBO:0000655
  // assumption fast transport
  L158EX: l158 -> l158_ext; L158EX_k*Vli*(l158 - l158_ext); L158EX is "L158 export (L158EX)";  // SBO:0000655
  // Assumption: identical bile transport of los, e3174 and l158.
  LOSBIEX: los => los_bi; MBIEX_k*Vli*los; LOSBIEX is "Losartan bile export";  // SBO:0000655
  LOSEHC: los_bi => los_lumen; LOSBIEX; LOSEHC is "Losartan enterohepatic circulation";  // SBO:0000655
  // Assumption: identical bile transport of los, e3174 and l158.
  E3174BIEX: e3174 => e3174_bi; MBIEX_k*Vli*e3174; E3174BIEX is "E3174 bile export";  // SBO:0000655
  E3174EHC: e3174_bi => e3174_lumen; E3174BIEX; E3174EHC is "E3174 enterohepatic circulation";  // SBO:0000655
  // Assumption: identical bile transport of los, e3174 and l158.
  L158BIEX: l158 => l158_bi; MBIEX_k*Vli*l158; L158BIEX is "L158 bile export";  // SBO:0000655
  L158EHC: l158_bi => l158_lumen; L158BIEX; L158EHC is "L158 enterohepatic circulation";  // SBO:0000655

  // Unit definitions:
  unit g_per_mole = gram / mole; g_per_mole is "g/mole";
  unit l_per_min = litre / (60 second); l_per_min is "l/min";
  unit m2 = metre^2; m2 is "meter^2";
  unit mM = 1e-3 mole / litre; mM is "mmole/liter";
  unit mg = 1e-3 gram;
  unit mg_per_s_l = 1e-3 gram / (second * litre); mg_per_s_l is "mg/s/l";
  unit min = 60 second;
  unit min_per_hr = 60 second / (3600 second); min_per_hr is "min/hour";
  unit mmole = 1e-3 mole;
  unit mmole_per_min = 1e-3 mole / (60 second); mmole_per_min is "mmole/min";
  unit mmole_per_min_l = 1e-3 mole / (60 second * litre); mmole_per_min_l is "mmole/min/l";
  unit per_min = 1 / (60 second); per_min is "1/min";
  unit per_mmole = 1 / (1e-3 mole); per_mmole is "1/mmole";
end
